#include "time.glm"
#include "weather.glm"
#include "residential.glm"
#include "recording.glm"
#set show_progress=FALSE
object house
{
	floor_area 2500 sf;
	object recorder
	{
		property "panel.power";
		file "house_1.csv";
		interval -1;
	};
}
