clock
{
	timezone ${TIMEZONE:-"MST+7MDT"};
	starttime ${INITTIME:-"2021-01-01 00:00:00 MST"};
	stoptime ${STOPTIME:-"2022-01-01 00:00:00 MST"};
}
#weather get ${WEATHER:-"CO-Denver_Intl_Ap.tmy3"}
#input ${WEATHER:-"CO-Denver_Intl_Ap.tmy3"} -p interpolate=QUADRATIC
module residential
{
	implicit_enduses ${ENDUSES:-DISHWASHER|CLOTHESWASHER|DRYER|WATERHEATER|REFRIGERATOR|RANGE|LIGHTS|PLUGS};
}
module tape
{
	csv_header_type NAME;
}
#set dateformat=ISO8601
#set complex_format="%+.6f%+.6fj"
module powerflow;
object triplex_meter
{
	phases AS;
	nominal_voltage 120;
	measured_energy_delta_timestep ${SAMPLETIME:-300};
	object house:..${NHOMES:-250}
	{
		floor_area random.triangle(${FLOORAREA_MIN:-1000},${FLOORAREA_MAX:-3000});
	};
	object recorder
	{
		in_svc ${STARTTIME:-"2021-01-01 00:00:00 MST"};
		property "measured_real_energy_delta";
		file ${modelname/.glm/.csv};
		interval ${SAMPLETIME:-300};
	};
}
#set minimum_timestep=${SAMPLETIME:-300}
